# OpenSim document version 20302
MarkerSet gait2392_Scale:
  Marker R.Acromium: torso (-0.03 0.44 0.15)
  Marker L.Acromium: torso (-0.03 0.44 -0.15)
  Marker Top.Head: torso (0.00084 0.657 0)
  Marker RASIS: pelvis (0.02 0.03 0.128)
  Marker LASIS: pelvis (0.02 0.03 -0.128)
  Marker V.Sacral: pelvis (-0.16 0.04 0)
  Marker RTH: femur_r (0.018 -0.2 0.064)
  Marker R.Thigh.Front: femur_r (0.08 -0.25 0.0047)
  Marker R.Thigh.Rear: femur_r (0.01 -0.3 0.06)
  Marker RLE: femur_r (0 -0.404 0.05)
  Marker RME: femur_r (0 -0.404 -0.05)
  Marker RHF: tibia_r (0.005 -0.065 0.05)
  Marker RTT: tibia_r (0.05 -0.08 0)
  Marker R.Shank.Rear: tibia_r (0.02 -0.13 0.05)
  Marker RLM: tibia_r (-0.005 -0.41 0.053)
  Marker RMM: tibia_r (0.006 -0.3888 -0.038)
  Marker RCA: calcn_r (-0.02 0.02 0)
  Marker R.Midfoot.Sup: calcn_r (0.13 0.03 -0.03)
  Marker R.Midfoot.Lat: calcn_r (0.1 0.02 0.04)
  Marker RVM: calcn_r (0.19 0 0.065)
  Marker RFM: calcn_r (0.19 0.005 -0.04)
  Marker R.Toe.Tip: calcn_r (0.26 0.005 0)
  Marker L.Thigh.Upper: femur_l (0.018 -0.2 -0.064)
  Marker LTH: femur_l (0.08 -0.25 -0.0047)
  Marker L.Thigh.Rear: femur_l (0.01 -0.3 -0.06)
  Marker LLE: femur_l (0 -0.404 -0.05)
  Marker LME: femur_l (0 -0.404 0.05)
  Marker LHF: tibia_l (0.005 -0.065 -0.05)
  Marker LTT: tibia_l (0.05 -0.08 0)
  Marker L.Shank.Rear: tibia_l (-0.02 -0.13 -0.05)
  Marker LLM: tibia_l (-0.005 -0.41 -0.053)
  Marker LMM: tibia_l (0.006 -0.3888 0.038)
  Marker LCA: calcn_l (-0.02 0.02 0)
  Marker L.Midfoot.Sup: calcn_l (0.13 0.03 0.03)
  Marker L.Midfoot.Lat: calcn_l (0.1 0.02 -0.04)
  Marker LVM: calcn_l (0.19 0 -0.065)
  Marker LFM: calcn_l (0.19 0.005 0.04)
  Marker L.Toe.Tip: calcn_l (0.26 0.005 0)
