# OpenSim document version 20302
MarkerSet rizzoli lower body protocol:
  Marker RASIS: pelvis (0.02 0.03 0.128)
  Marker LASIS: pelvis (0.02 0.03 -0.128)
  Marker RPSIS: pelvis (-0.16 0.04 0.05)
  Marker LPSIS: pelvis (-0.16 0.04 -0.05)
  Marker RGT: femur_r (-0.0170714 -0.0249624 0.064)
  Marker RTH: femur_r (0.08 -0.16 0.0047)
  Marker RSK: tibia_r (0.08 -0.3 0.0047)
  Marker RLE: femur_r (0 -0.404 0.05)
  Marker RME: femur_r (0 -0.404 -0.05)
  Marker RHF: tibia_r (0.005 -0.065 0.05)
  Marker RTT: tibia_r (0.05 -0.08 0)
  Marker RLM: tibia_r (-0.005 -0.41 0.053)
  Marker RMM: tibia_r (0.006 -0.3888 -0.038)
  Marker RCA: calcn_r (-0.02 0.02 0)
  Marker RVM: calcn_r (0.19 0 0.065)
  Marker RFM: calcn_r (0.19 0.005 -0.04)
  Marker LGT: femur_l (-0.0170714 -0.0249624 -0.064)
  Marker LTH: femur_l (0.08 -0.25 -0.0047)
  Marker LSK: tibia_l (0.08 -0.2 -0.0047)
  Marker LLE: femur_l (0 -0.404 -0.05)
  Marker LME: femur_l (0 -0.404 0.05)
  Marker LHF: tibia_l (0.005 -0.065 -0.05)
  Marker LTT: tibia_l (0.05 -0.08 0)
  Marker LLM: tibia_l (-0.005 -0.41 -0.053)
  Marker LMM: tibia_l (0.006 -0.3888 0.038)
  Marker LCA: calcn_l (-0.02 0.02 0)
  Marker LVM: calcn_l (0.19 0 -0.065)
  Marker LFM: calcn_l (0.19 0.005 0.04)
